// SBML level 3 version 2

model BIOMD0000000001()
  // Edelstein1996 - EPSP ACh event
  // Model of a nicotinic Excitatory Post-Synaptic Potential in a Torpedo electric organ. Acetylcholine is not represented explicitely, but by an event that changes the constants of transition from unliganded to liganded.
  // This model has initially been encoded using StochSim.
  // This model is described in the article:
  // A kinetic mechanism for nicotinic acetylcholine receptors based on multiple allosteric transitions.
  // Edelstein SJ, Schaad O, Henry E, Bertrand D, Changeux JP.
  // Biol Cybern 1996 Nov; 75(5): 361-379
  // Abstract:
  // Nicotinic acetylcholine receptors are transmembrane oligomeric proteins that mediate interconversions between open and closed channel states under the control of neurotransmitters. Fast in vitro chemical kinetics and in vivo electrophysiological recordings are consistent with the following multi-step scheme. Upon binding of agonists, receptor molecules in the closed but activatable resting state (the Basal state, B) undergo rapid transitions to states of higher affinities with either open channels (the Active state, A) or closed channels (the initial Inactivatable and fully Desensitized states, I and D). In order to represent the functional properties of such receptors, we have developed a kinetic model that links conformational interconversion rates to agonist binding and extends the general principles of the Monod-Wyman-Changeux model of allosteric transitions. The crucial assumption is that the linkage is controlled by the position of the interconversion transition states on a hypothetical linear reaction coordinate. Application of the model to the peripheral nicotine acetylcholine receptor (nAChR) accounts for the main properties of ligand-gating, including single-channel events, and several new relationships are predicted. Kinetic simulations reveal errors inherent in using the dose-response analysis, but justify its application under defined conditions. The model predicts that (in order to overcome the intrinsic stability of the B state and to produce the appropriate cooperativity) channel activation is driven by an A state with a Kd in the 50 nM range, hence some 140-fold stronger than the apparent affinity of the open state deduced previously. According to the model, recovery from the desensitized states may occur via rapid transit through the A state with minimal channel opening, thus without necessarily undergoing a distinct recovery pathway, as assumed in the standard 'cycle' model. Transitions to the desensitized states by low concentration 'pre-pulses' are predicted to occur without significant channel opening, but equilibrium values of IC50 can be obtained only with long pre-pulse times. Predictions are also made concerning allosteric effectors and their possible role in coincidence detection. In terms of future developments, the analysis presented here provides a physical basis for constructing more biologically realistic models of synaptic modulation that may be applied to artificial neural networks.
  // This model is hosted on BioModels Database and identified by: BIOMD0000000001.
  // To cite BioModels Database, please use: BioModels Database: An enhanced, curated and annotated resource for published quantitative kinetic models.
  // To the extent possible under law, all copyright and related or neighbouring rights to this encoded model have been dedicated to the public domain worldwide. Please refer to CC0 Public Domain Dedication for more information.
  // model units - substance: substance, time: time, volume: volume, area: area, length: length, extent: substance

  // Compartments:
  compartment comp1 = 1e-16 volume; comp1 is "compartment1";  // SBO:0000290; GO:0031594

  // Species:
  // biliganded basal state
  species $BLL in comp1 = 0; BLL is "BasalACh2";  // SBO:0000297; isVersionOf GO:0005892; isVersionOf interpro:IPR002394
  // monoliganded intermediate
  species $IL in comp1 = 0; IL is "IntermediateACh";  // SBO:0000297; isVersionOf GO:0005892; isVersionOf interpro:IPR002394
  // monoliganded active state
  species $AL in comp1 = 0; AL is "ActiveACh";  // SBO:0000297; isVersionOf GO:0005892; isVersionOf interpro:IPR002394
  // unkiganded active state
  species $A in comp1 = 0; A is "Active";  // SBO:0000420; isVersionOf interpro:IPR002394; isVersionOf GO:0005892
  // monoliganded basal state
  species $BL in comp1 = 0; BL is "BasalACh";  // SBO:0000297; isVersionOf interpro:IPR002394; isVersionOf GO:0005892
  // unliganded basal state
  species $B in comp1 = 1.660578e-5; B is "Basal";  // SBO:0000420; isVersionOf GO:0005892; isVersionOf interpro:IPR002394
  // biliganded desensitised state
  species $DLL in comp1 = 0; DLL is "DesensitisedACh2";  // SBO:0000297; isVersionOf GO:0005892; isVersionOf interpro:IPR002394
  // fully desensitised state
  species $D in comp1 = 0; D is "Desensitised";  // SBO:0000420; isVersionOf GO:0005892; isVersionOf interpro:IPR002394
  // biliganded intermediate
  species $ILL in comp1 = 0; ILL is "IntermediateACh2";  // SBO:0000297; isVersionOf interpro:IPR002394; isVersionOf GO:0005892
  // monoliganded desensitised state
  species $DL in comp1 = 0; DL is "DesensitisedACh";  // SBO:0000297; isVersionOf GO:0005892; isVersionOf interpro:IPR002394
  // unliganted intermediate
  species $I in comp1 = 0; I is "Intermediate";  // SBO:0000420; isVersionOf interpro:IPR002394; isVersionOf GO:0005892
  // biliganted active state
  species $ALL in comp1 = 0; ALL is "ActiveACh2";  // SBO:0000297; isVersionOf GO:0005892; isVersionOf interpro:IPR002394

  // Parameters:
  kf_0 = 3000;  // SBO:0000035
  kr_0 = 8000;  // SBO:0000038
  kf_1 = 1500;  // SBO:0000035
  kr_1 = 16000;  // SBO:0000038
  kf_2 = 30000;  // SBO:0000035
  kr_2 = 700;  // SBO:0000038
  kf_3 = 3000;  // SBO:0000035
  kr_3 = 8.64;  // SBO:0000038
  kf_4 = 1500;  // SBO:0000035
  kr_4 = 17.28;  // SBO:0000038
  kf_5 = 0.54;  // SBO:0000035
  kr_5 = 10800;  // SBO:0000038
  kf_6 = 130;  // SBO:0000035
  kr_6 = 2740;  // SBO:0000038
  kf_7 = 3000;  // SBO:0000035
  kr_7 = 4;  // SBO:0000038
  kf_8 = 1500;  // SBO:0000035
  kr_8 = 8;  // SBO:0000038
  kf_9 = 19.7;  // SBO:0000035
  kr_9 = 3.74;  // SBO:0000038
  kf_10 = 19.85;  // SBO:0000035
  kr_10 = 1.74;  // SBO:0000038
  kf_11 = 20;  // SBO:0000035
  kr_11 = 0.81;  // SBO:0000038
  kf_12 = 3000;  // SBO:0000035
  kr_12 = 4;  // SBO:0000038
  kf_13 = 1500;  // SBO:0000035
  kr_13 = 8;  // SBO:0000038
  kf_14 = 0.05;  // SBO:0000035
  kr_14 = 0.0012;  // SBO:0000038
  kf_15 = 0.05;  // SBO:0000035
  kr_15 = 0.0012;  // SBO:0000038
  kf_16 = 0.05;  // SBO:0000035
  kr_16 = 0.0012;  // SBO:0000038
  t2 = 20;

  // Rate rules:
  BLL' = 1*(comp1*(kf_1*BL - kr_1*BLL)/comp1) + (-1*(comp1*(kf_2*BLL - kr_2*ALL)/comp1));
  IL' = 1*(comp1*(kf_7*I - kr_7*IL)/comp1) + (-1*(comp1*(kf_8*IL - kr_8*ILL)/comp1)) + 1*(comp1*(kf_10*AL - kr_10*IL)/comp1) + (-1*(comp1*(kf_15*IL - kr_15*DL)/comp1));
  AL' = 1*(comp1*(kf_3*A - kr_3*AL)/comp1) + (-1*(comp1*(kf_4*AL - kr_4*ALL)/comp1)) + 1*(comp1*(kf_6*BL - kr_6*AL)/comp1) + (-1*(comp1*(kf_10*AL - kr_10*IL)/comp1));
  A' = -1*(comp1*(kf_3*A - kr_3*AL)/comp1) + 1*(comp1*(kf_5*B - kr_5*A)/comp1) + (-1*(comp1*(kf_9*A - kr_9*I)/comp1));
  BL' = 1*(comp1*(kf_0*B - kr_0*BL)/comp1) + (-1*(comp1*(kf_1*BL - kr_1*BLL)/comp1)) + (-1*(comp1*(kf_6*BL - kr_6*AL)/comp1));
  B' = -1*(comp1*(kf_0*B - kr_0*BL)/comp1) + (-1*(comp1*(kf_5*B - kr_5*A)/comp1));
  DLL' = 1*(comp1*(kf_13*DL - kr_13*DLL)/comp1) + 1*(comp1*(kf_16*ILL - kr_16*DLL)/comp1);
  D' = -1*(comp1*(kf_12*D - kr_12*DL)/comp1) + 1*(comp1*(kf_14*I - kr_14*D)/comp1);
  ILL' = 1*(comp1*(kf_8*IL - kr_8*ILL)/comp1) + 1*(comp1*(kf_11*ALL - kr_11*ILL)/comp1) + (-1*(comp1*(kf_16*ILL - kr_16*DLL)/comp1));
  DL' = 1*(comp1*(kf_12*D - kr_12*DL)/comp1) + (-1*(comp1*(kf_13*DL - kr_13*DLL)/comp1)) + 1*(comp1*(kf_15*IL - kr_15*DL)/comp1);
  I' = -1*(comp1*(kf_7*I - kr_7*IL)/comp1) + 1*(comp1*(kf_9*A - kr_9*I)/comp1) + (-1*(comp1*(kf_14*I - kr_14*D)/comp1));
  ALL' = 1*(comp1*(kf_2*BLL - kr_2*ALL)/comp1) + 1*(comp1*(kf_4*AL - kr_4*ALL)/comp1) + (-1*(comp1*(kf_11*ALL - kr_11*ILL)/comp1));

  // Events:
  removal_of_ACh: at (time > t2): kf_0 = 0, kf_3 = 0, kf_7 = 0, kf_12 = 0, kf_1 = 0, kf_4 = 0, kf_8 = 0, kf_13 = 0;

  // Unit definitions:
  unit length = metre;
  unit area = metre^2;
  unit volume = litre;
  unit time = second;
  unit substance = mole;
end
